// SBML level 2 version 4

model DIIVENUS_fullmodel()
  // Band2012_DII-Venus_FullModel
  // This model is from the article:
  // Root gravitropism is regulated by a transient lateral auxin gradient controlled by a tipping-point mechanism.
  // Band LR, Wells DM, Larrieu A, Sun J, Middleton AM, French AP, Brunoud G, Sato EM, Wilson MH, Péret B, Oliva M, Swarup R, Sairanen I, Parry G, Ljung K, Beeckman T, Garibaldi JM, Estelle M, Owen MR, Vissenberg K, Hodgman TC, Pridmore TP, King JR, Vernoux T, Bennett MJ. Proc Natl Acad Sci U S A.2012 Mar 20;109(12):4668-73 22393022,
  // Abstract:
  // Gravity profoundly influences plant growth and development. Plants respond to changes in orientation by using gravitropic responses to modify their growth. Cholodny and Went hypothesized over 80 years ago that plants bend in response to a gravity stimulus by generating a lateral gradient of a growth regulator at an organ's apex, later found to be auxin. Auxin regulates root growth by targeting Aux/IAA repressor proteins for degradation. We used an Aux/IAA-based reporter, domain II (DII)-VENUS, in conjunction with a mathematical model to quantify auxin redistribution following a gravity stimulus. Our multidisciplinary approach revealed that auxin is rapidly redistributed to the lower side of the root within minutes of a 90° gravity stimulus. Unexpectedly, auxin asymmetry was rapidly lost as bending root tips reached an angle of 40° to the horizontal. We hypothesize roots use a "tipping point" mechanism that operates to reverse the asymmetric auxin flow at the midpoint of root bending. These mechanistic insights illustrate the scientific value of developing quantitative reporters such as DII-VENUS in conjunction with parameterized mathematical models to provide high-resolution kinetics of hormone redistribution.
  // This model corresponds to the full model described in the article.
  // biomodels.db:MODEL1203230002
  // biomodels.db:BIOMD0000000413
  // isDescribedBy pubmed:22393022
  // hasTaxon taxonomy:3701
  // isVersionOf GO:0090354 GO:0009958
  // hasProperty mamo:MAMO_0000046

  // Compartments:
  compartment cell = 1;  // isVersionOf GO:0005623

  // Species:
  species auxin in cell = 7.38;  // isVersionOf uniprot:P49677
  species TIR1 in cell = 15.4;  // isVersionOf uniprot:Q570C0 uniprot:Q9ZR12 uniprot:Q9LW29 uniprot:Q9LPW7
  species auxinTIR1 in cell = 0.28;  // hasPart uniprot:P49677 uniprot:Q570C0
  species auxinTIR1VENUS in cell = 2.78;  // hasPart uniprot:P49677 uniprot:Q570C0 uniprot:Q9XFM0 uniprot:Q940U6
  species VENUS in cell = 40.4;  // hasPart uniprot:Q940U6 uniprot:Q9XFM0

  // Parameters:
  kd = 0.334;
  ka = 0.000822;
  mu = 0.79;
  ld = 4.49;
  lm = 0.175;
  la = 1.15;
  delta = 0.486;
  lambda = 0.00316;
  TIR1T = 18.5;
  alpha_tr = 30.5;

  // Reactions:
  auxin_TIR1association: auxin + TIR1 => auxinTIR1; ka*auxin_TIR1association_kf*auxin*TIR1;  // isVersionOf GO:0006461
    auxin_TIR1association_kf = 100;
  auxin_TIR1dissociation: auxinTIR1 => auxin + TIR1; kd*auxin_TIR1dissociation_kf*auxinTIR1;  // isVersionOf GO:0043241
    auxin_TIR1dissociation_kf = 1;
  auxin_TIR1_VENUSassociation: auxinTIR1 + VENUS => auxinTIR1VENUS; la*auxin_TIR1_VENUSassociation_kf*auxinTIR1*VENUS;  // isVersionOf GO:0006461
    auxin_TIR1_VENUSassociation_kf = 1;
  auxin_TIR1_VENUSdissociation: auxinTIR1VENUS => auxinTIR1 + VENUS; ld*auxin_TIR1_VENUSdissociation_kf*auxinTIR1VENUS;  // isVersionOf GO:0043241
    auxin_TIR1_VENUSdissociation_kf = 1;
  auxin_TIR1_VENUSdissociationleadingtoubiquitination: auxinTIR1VENUS => auxinTIR1; lm*auxin_TIR1_VENUSdissociationleadingtoubiquitination_kf*auxinTIR1VENUS;  // isVersionOf GO:0043241
    auxin_TIR1_VENUSdissociationleadingtoubiquitination_kf = 1;
  auxinproduction: => auxin; alpha_tr;  // isVersionOf GO:0006412
    auxinproduction_kf = 1;
  auxindecay: auxin => ; mu*auxindecay_kf*auxin;  // isVersionOf GO:0030163
    auxindecay_kf = 1;
  VENUSproduction: => VENUS; delta;  // isVersionOf GO:0006412
    VENUSproduction_kf = 1;
  VENUSphotobleachingdecay: VENUS => ; lambda*VENUSphotobleachingdecay_kf*VENUS;  // isVersionOf GO:0030163
    VENUSphotobleachingdecay_kf = 1;
end
