// SBML level 2 version 1

model MODEL8177704759()
  // Brands2002 - Monosaccharide-casein systems
  // A kinetic model of the Maillard reaction occurring in heated monosaccharide-casein system.
  // This model is described in the article:
  // Kinetic modeling of reactions in heated monosaccharide-casein systems.
  // Brands CM, van Boekel MA
  // Journal of Agricultural and Food Chemistry. 2002, 50(23):6725-6739
  // Abstract:
  // In the present study, a kinetic model of the Maillard reaction occurring in heated monosaccharide-casein systems was proposed. Its parameters, the reaction rate constants, were estimated via multiresponse modeling. The determinant criterion was used as the statistical fit criterion instead of the familiar least squares to avoid statistical problems. The kinetic model was extensively tested by varying the reaction conditions. Different sugars (glucose, fructose, galactose, and tagatose) were studied regarding their effect on the reaction kinetics. This study has shown the power of multiresponse modeling for the unraveling of complicated reaction routes as occur in the Maillard reaction. The iterative process of proposing a model, confronting it with experiments, and criticizing the model was passed through four times to arrive at a model that was largely consistent with all results obtained. A striking difference was found between aldose and ketose sugars as suggested by the modeling results: not the ketoses themselves but only their reaction products were found to be reactive in the Maillard reaction.
  // This model is hosted on BioModels Database and identified by: MODEL8177704759 .
  // To cite BioModels Database, please use: BioModels Database: An enhanced, curated and annotated resource for published quantitative kinetic models .
  // To the extent possible under law, all copyright and related or neighbouring rights to this encoded model have been dedicated to the public domain worldwide. Please refer to CC0 Public Domain Dedication for more information.
  // biomodels.db:MODEL8177704759
  // biomodels.db:BIOMD0000000052
  // isDescribedBy pubmed:12405768
  // isDerivedFrom pubmed:11600005
  // hasTaxon taxonomy:131567
  // isVersionOf GO:0046364 GO:0048029

  // Compartments:
  compartment compartment = 1;

  // Species:
  species Glu in compartment = 160;  // CHEBI:17234 kegg.compound:C00293
  species Fru in compartment = 0;  // CHEBI:28757 kegg.compound:C01496
  species Formic_acid in compartment = 0;  // CHEBI:30751 kegg.compound:C00058
  species Triose in compartment = 0;
  species Acetic_acid in compartment = 0;  // CHEBI:15366 kegg.compound:C00033
  species Cn in compartment = 0;
  species Amadori in compartment = 0;
  species AMP in compartment = 0;
  species C5 in compartment = 0;
  species lys_R in compartment = 15;  // CHEBI:32568
  species Melanoidin in compartment = 0;

  // Reactions:
  _J1: Glu => Fru; K1*Glu;
    K1 = 0.01;
  _J2: Fru => Glu; K2*Fru;
    K2 = 0.00509;
  _J3: Glu => C5 + Formic_acid; K3*Glu;
    K3 = 0.00047;
  _J3_r: C5 + Formic_acid => Glu; K3_r*C5*Formic_acid;
    K3_r = 0.000000001;
  _J4: Fru => C5 + Formic_acid; K4*Fru;
    K4 = 0.0011;
  _J4_r: C5 + Formic_acid => Fru; K4_r*C5*Formic_acid;
    K4_r = 0.000000001;
  _J5: Fru => 2 Triose; K5*Fru;
    K5 = 0.00712;
  _J6: Triose => Cn + Acetic_acid; K6*Triose;
    K6 = 0.00439;
  _J6_r: Cn + Acetic_acid => Triose; K6_r*Cn*Acetic_acid;
    K6_r = 0.000000001;
  _J7: lys_R + Glu => Amadori; K7*Glu*lys_R;
    K7 = 0.00018;
  _J8: Amadori => Acetic_acid + lys_R; K8*Amadori;
    K8 = 0.11134;
  _J8_r: Acetic_acid + lys_R => Amadori; K8_r*Acetic_acid*lys_R;
    K8_r = 0.000000001;
  _J9: Amadori => AMP; K9*Amadori;
    K9 = 0.14359;
  _J10: lys_R + Fru => AMP; K10*Fru*lys_R;
    K10 = 0.00015;
  _J11: AMP => Melanoidin; K11*AMP;
    K11 = 0.12514;
  _J11_r: Melanoidin => AMP; K11_r*Melanoidin;
    K11_r = 0.000000001;

  // Unit definitions:
  unit substance = 1e-3 mole; substance is "millimole (default)";
  unit time = 60 second; time is "minute (default)";
end
